#set iteration_limit=100000;

module powerflow {
	solver_method NR;
	line_capacitance false;
	}

// object voltdump {
//     filename voltage.csv;
// 	mode RECT;
// }

object node { //650 {
      name n650;
      phases "ABCN";
      bustype SWING;
      voltage_A 2401.7771;
      voltage_B -1200.8886-2080.000j;
      voltage_C -1200.8886+2080.000j;
      nominal_voltage 2401.7771;
}


object regulator_configuration:75 {
     name feeder_reg_cfg;
     Control OUTPUT_VOLTAGE;
     band_center 7500.0;
     band_width 120;
     connect_type WYE_WYE;
     time_delay 30;
     raise_taps 16;
     lower_taps 16;
     regulation 0.10;
     tap_pos_A 0;
     tap_pos_B 0;
     tap_pos_C 0;
}

object regulator:74 {
     name fregn650n630;
     from n650;
     to n630;
     phases ABC;
     configuration feeder_reg_cfg;
}

object node { //630 {
     name n630;
     phases "ABCN";
     voltage_A 2401.7771+0j;
     voltage_B -1200.8886-2080.000j;
     voltage_C -1200.8886+2080.000j;
     nominal_voltage 2401.7771;
}


object underground_line:48 {
     name GC-12-47-1_ul_3;
     phases ABCN;
     from n630;
     to l632;
     length 2000;
     configuration line_configuration:6;
}


object line_configuration:6 {
     conductor_A underground_line_conductor:2;
     conductor_B underground_line_conductor:2;
     conductor_C underground_line_conductor:2;
     conductor_N underground_line_conductor:2;
     spacing line_spacing:5;
}

object line_spacing:5 {
     distance_AB 3.0 in;
     distance_BC 3.0 in;
     distance_AC 3.0 in;
     distance_AN 2.0 in;
     distance_BN 2.0 in;
     distance_CN 2.0 in;
}


object underground_line_conductor:2 {
     //name 1000 AAC (Conc);
    //  rating.summer.continuous 488.0;
     outer_diameter 2.15;
     conductor_gmr 0.0371 ft;
     conductor_diameter 1.152;
     conductor_resistance 0.091872;
     neutral_gmr 0.0842565914341201 ft;
     neutral_resistance 5.3856;
     neutral_diameter 0.1019;
     neutral_strands 20.0;
    //  shield_gmr 0.00;
    //  shield_resistance 0.00;
}

object load {
     name l632;
     phases "ABCN";
     constant_power_A 11333.333+6666.6667j;
     constant_power_B 44000+25333.3333j;
     constant_power_C 78000+45333.3333j;
     nominal_voltage 2401.7771;
}


object voltdump {
     filename result.csv;
     mode RECT;
}


clock {
	timezone EST+8EDT;
	timestamp '2000-01-01 0:00:00';
	stoptime '2000-01-01 0:00:01';
}
